// SBML level 3 version 1

model test()

  // Compartments:
  compartment default_compartment = 1;

  // Species:
  species i in default_compartment = 0.05;
  species I in default_compartment = 0;
  species F in default_compartment = 0.18;
  species IF in default_compartment = 0;
  species W in default_compartment = 0.33;
  species IW in default_compartment = 0;
  species C1 in default_compartment = 0;
  species C2 in default_compartment = 0;
  species C3 in default_compartment = 0;

  // Parameters:
  k1 = 5*10^6;
  k2 = 10^8;
  k3 = 1.6*10^8;
  k4 = 3.5*10^(-1);
  k5 = 1.6*10^4;
  k6 = 2.3*10^(-2);
  k7 = 1.6*10^8;
  k8 = 0.5*10^7;

  // Reactions:
  J1: i -> I; k1*i - k2*I;
  J2: I + F -> IF; k3*I*F - k4*IF;
  J3: I + W -> IW; k5*I*W - k6*IW;
  J4: IF + IF -> C1; k7*IF^2 - k8*C1;
  J5: IW + IW -> C2; k7*IW^2 - k8*C2;
  J6: IF + IW -> C3; k7*IF*IW - k8*C3;
end
